<?xml version="1.0"?>

<!--
    File:     PT6A-27.xml
    Author:   AeromatiC++ v 3.3.1

    See: http://wiki.flightgear.org/JSBSim_Engines#FGTurboprop

    Inputs:
        Name:                   PT6A-27
        Type:                   Turboprop Engine
        Power:                  620.0 hp
        Inlet temperature:      994.0 degrees C
        Overall pressure ratio: 6.3:1

    Outputs:
        psfc:                   0.615 lbs/hr/hp
        Engine weight:          368.9 lbs
        Engine length:          5.1 ft
        Engine diameter:        1.9 ft
-->

<turboprop_engine name="PT6A-27">
    <milthrust unit="LBS">        900     </milthrust>
    <idlen1>                       60.0   </idlen1>
    <maxn1>                       100.0   </maxn1>
    <maxpower unit="HP">          620.0   </maxpower>
    <psfc unit="LBS/HR/HP">         0.615 </psfc>
    <n1idle_max_delay>              1.5   </n1idle_max_delay>
    <maxstartingtime>             0.1     </maxstartingtime>
    <startern1>                    20     </startern1>
    <ielumaxtorque unit="FT*LB"> 1629.3   </ielumaxtorque>
    <itt_delay>                     0.05  </itt_delay>
    <betarangeend>                 64     </betarangeend>
    <reversemaxpower>              60     </reversemaxpower>

    <function name="EnginePowerVC">
        <table>
            <description> Engine power, function of airspeed and pressure </description>
            <independentVar lookup="row">atmosphere/P-psf</independentVar>
            <independentVar lookup="column">velocities/ve-kts</independentVar>
            <tableData>
                       0     50     100     150     200     250     300     350
                 503   0.357  0.380   0.400   0.425   0.457   0.486   0.517   0.550
                1048   0.586  0.589   0.600   0.621   0.650   0.686   0.724   0.764
                1328   0.707  0.721   0.731   0.757   0.786   0.821   0.858   0.896
                1496   0.779  0.786   0.808   0.821   0.857   0.900   0.945   0.993
                1684   0.850  0.857   0.874   0.900   0.943   0.979   1.016   1.055
                1896   0.914  0.929   0.946   0.971   1       1.057   1.117   1.181
                2135   1      1.011   1.029   1.043   1.083   1.150   1.221   1.297
                2213   1.029  1.043   1.057   1.079   1.114   1.171   1.231   1.294
            </tableData>
        </table>
    </function>

    <table name="EnginePowerRPM_N1" type="internal">
        <description> Engine Power, function of RPM and N1 </description>
        <tableData>
                       0       5      60      86      94      95      96      97      98      99     100     101
               0.0     0.0     0.5     0.5     0.5     0.5     0.5     0.5     0.5     0.5     0.5     0.5     0.5
             853.7     0.0     0.5    32.0   183.1   320.3   347.8   384.4   421.0   457.6   485.0   530.8   567.5
            1278.2     0.0     0.5    27.5   210.5   366.1   393.5   430.2   462.2   503.3   540.0   585.8   622.3
            1705.1     0.0     0.5     4.6   219.6   402.7   434.7   466.8   503.3   544.5   576.6   622.3   658.9
            2131.9     0.0     0.1     0.1   205.9   411.9   453.0   480.5   517.1   558.3   594.9   640.6   681.8
            2345.4     0.0     0.1     0.1   187.6   402.7   439.3   471.3   512.5   553.7   590.3   636.1   680.0
        </tableData>
    </table>

    <table name="ITT_N1" type="internal">
        <description> Inter-Turbine Temperature ITT [deg C] depending on N1 and engine run (0=off / 1=running) </description>
        <tableData>
                    0       1
              0     0       0
             15   144.1   144.1
             60   258.4   749.5
             96   388.7   980.1
            100   403.6  1083.5
        </tableData>
    </table>

    <table name="CombustionEfficiency_N1" type="internal">
        <description>Dependency of fuel efficiency coefficient on N1 (and RPM)</description>
        <tableData>
             90    0.1221
             91.2  0.2834
             92.2  0.5336
             93.4  0.7188
             94.1  0.7741
             95.2  0.8471
             96.5  0.9001
            100    1
        </tableData>
    </table>
</turboprop_engine>
